<?xml version="1.0" encoding="UTF-8"?>
<!--
  File:     Continental_TSIO-520-R.xml
  Author:   Aero-Matic v 0.83

  Inputs:
    name:           Continental_TSIO-520-R
    type:           piston
    power:          310 hp
    augmented?      no
    injected?       no
-->

<piston_engine name="Continental_TSIO-520-R">
  <minmp unit="INHG">         10.0 </minmp>
  <maxmp unit="INHG">         28.5 </maxmp>
  <displacement unit="IN3"> 520.00 </displacement>
  <maxhp>        310.00 </maxhp>
  <cycles>         4.0 </cycles>
  <idlerpm>      700.0 </idlerpm>
  <maxrpm>      2800.0 </maxrpm>
  <sparkfaildrop>  0.1 </sparkfaildrop>
  <volumetric-efficiency> 0.85 </volumetric-efficiency>
  <man-press-lag> 0.1 </man-press-lag>
  <static-friction  unit="HP"> 1.55 </static-friction>
  <starter-torque> 248.00 </starter-torque>
  <starter-rpm> 1400 </starter-rpm>
 <!-- Defining <bsfc> over-rides the built-in horsepower calculations -->
 <!--<bsfc>           0.45 </bsfc>-->
  <stroke unit="IN">  4.0 </stroke>
  <bore unit="IN">    5.25 </bore>
  <cylinders>         6.0  </cylinders>
  <compression-ratio>  7.5 </compression-ratio>
</piston_engine>
