<?xml version="1.0"?>
<?xml-stylesheet type="text/xsl" href="http://jsbsim.sourceforge.net/JSBSim.xsl"?>
<fdm_config name="p210n" version="2.0" release="ALPHA" xmlns:xsi="http://www.w3.org/2001/XMLSchema-instance" xsi:noNamespaceSchemaLocation="http://jsbsim.sourceforge.net/JSBSim.xsd">
	<fileheader>
		<author>TheEagle, Ysop</author>
		<filecreationdate>2021-09-14</filecreationdate>
		<version>0.5</version>
		<description>Models a Cessna P210N.</description>
	</fileheader>

	<metrics>
		<wingarea unit="FT2">175</wingarea>
		<wingspan unit="FT">36.74</wingspan>
		<wing_incidence>1</wing_incidence>
		<chord unit="FT">4.76</chord>
		<htailarea unit="FT2">28</htailarea>
		<htailarm unit="FT">19.3</htailarm>
		<vtailarea unit="FT2">17.5</vtailarea>
		<vtailarm unit="FT">20.8</vtailarm>
		<location name="AERORP" unit="IN">
			<x>48.8</x>
			<y>0</y>
			<z>31.8</z>
		</location>
		<location name="EYEPOINT" unit="IN">
			<x>41</x>
			<y>-15</y>
			<z>17</z>
		</location>
		<!--<location name="VRP" unit="IN">
			<x>91.92</x>
			<y>0</y>
			<z>-9.84</z>
		</location>-->
		<location name="VRP" unit="IN">
			<x>0</x>
			<y>0</y>
			<z>0</z>
		</location>
	</metrics>

	<mass_balance>
		<ixx unit="SLUG*FT2">2034</ixx>
		<iyy unit="SLUG*FT2">1812</iyy>
		<izz unit="SLUG*FT2">3600</izz>
		<emptywt unit="LBS" >2342</emptywt>
		<!-- ref. datum is at 51.84  inches -->
		<!-- maximum aft location of the CG is 49 inches
			   maximum forward location of the CG is 38.4 inches
			   at 3000 pound gross weight empty weight CG is 42 inches-->
		<location name="CG" unit="IN">
			<x>42</x>
			<y>0</y>
			<z>-3</z>
		</location>
		<pointmass name="Pilot">
			<weight unit="LBS">170</weight>
			<location name="POINTMASS" unit="IN">
				<x>42.1</x>
				<y>-11</y>
				<z>0</z>
			</location>
		</pointmass>
		<pointmass name="Copilot">
			<weight unit="LBS">170</weight>
			<location name="POINTMASS" unit="IN">
				<x>42.1</x>
				<y>-11</y>
				<z>0</z>
			</location>
		</pointmass>
		<pointmass name="Middle left passenger">
			<weight unit="LBS">170</weight>
			<location name="POINTMASS" unit="IN">
				<x>73.6</x>
				<y>-11</y>
				<z>0</z>
			</location>
		</pointmass>
		<pointmass name="Middle right passenger">
			<weight unit="LBS">170</weight>
			<location name="POINTMASS" unit="IN">
				<x>73.6</x>
				<y>11</y>
				<z>0</z>
			</location>
		</pointmass>
		<pointmass name="Rear left passenger">
			<weight unit="LBS">170</weight>
			<location name="POINTMASS" unit="IN">
				<x>105.1</x>
				<y>-11</y>
				<z>3</z>
			</location>
		</pointmass>
		<pointmass name="Rear right passenger">
			<weight unit="LBS">170</weight>
			<location name="POINTMASS" unit="IN">
				<x>105.1</x>
				<y>11</y>
				<z>3</z>
			</location>
		</pointmass>
		<pointmass name="Baggage A">
			<weight unit="LBS">181.5</weight>
			<location name="POINTMASS" unit="IN">
				<x>131.2</x>
				<y>0</y>
				<z>-5</z>
			</location>
		</pointmass>
		<pointmass name="Baggage B">
			<weight unit="LBS">80</weight>
			<location name="POINTMASS" unit="IN">
				<x>159.3</x>
				<y>0</y>
				<z>-7</z>
			</location>
		</pointmass>
	</mass_balance>

	<ground_reactions>
		<!-- 0, 1, 2: gear bogeys -->
		<contact type="BOGEY" name="NOSE">
			<location unit="IN">
				<x>-10.5</x>
				<y>0</y>
				<z>-42.7</z>
			</location>
			<static_friction>1.4</static_friction>
			<dynamic_friction>0.6</dynamic_friction>
			<rolling_friction> 0.03 </rolling_friction>
			<spring_coeff unit="LBS/FT">5000</spring_coeff>
			<damping_coeff unit="LBS/FT/SEC">500</damping_coeff>
			<max_steer unit="DEG">35</max_steer>
			<brake_group>NONE</brake_group>
			<retractable>1</retractable>
			<table name="CORNERING_COEFF" type="internal">
				<tableData>
					-90.0	-0.6276256632207626
					-85.0	-0.6417393571173159
					-80.0	-0.6578124074897477
					-75.0	-0.6761339658692869
					-70.0	-0.6970340668693019
					-65.0	-0.7208796953965572
					-60.0	-0.7480586200367123
					-55.0	-0.7789376993218241
					-50.0	-0.8137693871814174
					-45.0	-0.852494972166421
					-40.0	-0.8943455737614107
					-35.0	-0.9370583530652546
					-30.0	-0.9754028875043508
					-25.0	-0.9986292585314367
					-20.0	-0.9867956894252938
					-15.0	-0.9078708239414398
					-10.0	-0.722622440415344
					-5.0	-0.4088092889390962
					0.0		0.0
					5.0		0.4088092889390962
					10.0	0.722622440415344
					15.0	0.9078708239414398
					20.0	0.9867956894252938
					25.0	0.9986292585314367
					30.0	0.9754028875043508
					35.0	0.9370583530652546
					40.0	0.8943455737614107
					45.0	0.852494972166421
					50.0	0.8137693871814174
					55.0	0.7789376993218241
					60.0	0.7480586200367123
					65.0	0.7208796953965572
					70.0	0.6970340668693019
					75.0	0.6761339658692869
					80.0	0.6578124074897477
					85.0	0.6417393571173159
					90.0	0.6276256632207626
				</tableData>
			</table>
		</contact>

		<contact type="BOGEY" name="LEFT_MAIN">
			<location unit="IN">
				<x>61.5</x>
				<y>-57.6</y>
				<z>-43</z>
			</location>
			<static_friction>0.8</static_friction>
			<dynamic_friction>0.5</dynamic_friction>
			<rolling_friction>0.03</rolling_friction>
			<spring_coeff unit="LBS/FT">5000</spring_coeff>
			<damping_coeff unit="LBS/FT/SEC">800</damping_coeff>
			<max_steer unit="DEG">0</max_steer>
			<brake_group>LEFT</brake_group>
			<retractable>1</retractable>
			<table name="CORNERING_COEFF" type="internal">
				<tableData>
					-90.0	-0.36002473976092286
					-85.0	-0.36102751131832267
					-80.0	-0.3627449370500885
					-75.0	-0.36531314481257565
					-70.0	-0.3689047855385693
					-65.0	-0.3737415915036813
					-60.0	-0.38011209145542657
					-55.0	-0.38839678093395447
					-50.0	-0.39910386959442057
					-45.0	-0.4129191444807593
					-40.0	-0.4307712668291449
					-35.0	-0.45390051850784563
					-30.0	-0.4838633152141222
					-25.0	-0.5221891694354972
					-20.0	-0.5685885521301528
					-15.0	-0.6136582771536571
					-10.0	-0.6140585944685442
					-5.0	-0.4454728480629502
					0.0		0.0
					5.0		0.4454728480629502
					10.0	0.6140585944685442
					15.0	0.6136582771536571
					20.0	0.5685885521301528
					25.0	0.5221891694354972
					30.0	0.4838633152141222
					35.0	0.45390051850784563
					40.0	0.4307712668291449
					45.0	0.4129191444807593
					50.0	0.39910386959442057
					55.0	0.38839678093395447
					60.0	0.38011209145542657
					65.0	0.3737415915036813
					70.0	0.3689047855385693
					75.0	0.36531314481257565
					80.0	0.3627449370500885
					85.0	0.36102751131832267
					90.0	0.36002473976092286
				</tableData>
			</table>
		</contact>

		<contact type="BOGEY" name="RIGHT_MAIN">
			<location unit="IN">
				<x>61.5</x>
				<y>57.6</y>
				<z>-43</z>
			</location>
			<static_friction>0.8</static_friction>
			<dynamic_friction>0.5</dynamic_friction>
			<rolling_friction>0.03</rolling_friction>
			<spring_coeff unit="LBS/FT">5000</spring_coeff>
			<damping_coeff unit="LBS/FT/SEC">800</damping_coeff>
			<max_steer unit="DEG">0</max_steer>
			<brake_group>RIGHT</brake_group>
			<retractable>1</retractable>
			<table name="CORNERING_COEFF" type="internal">
				<tableData>
					-90.0	-0.36002473976092286
					-85.0	-0.36102751131832267
					-80.0	-0.3627449370500885
					-75.0	-0.36531314481257565
					-70.0	-0.3689047855385693
					-65.0	-0.3737415915036813
					-60.0	-0.38011209145542657
					-55.0	-0.38839678093395447
					-50.0	-0.39910386959442057
					-45.0	-0.4129191444807593
					-40.0	-0.4307712668291449
					-35.0	-0.45390051850784563
					-30.0	-0.4838633152141222
					-25.0	-0.5221891694354972
					-20.0	-0.5685885521301528
					-15.0	-0.6136582771536571
					-10.0	-0.6140585944685442
					-5.0	-0.4454728480629502
					0.0		0.0
					5.0		0.4454728480629502
					10.0	0.6140585944685442
					15.0	0.6136582771536571
					20.0	0.5685885521301528
					25.0	0.5221891694354972
					30.0	0.4838633152141222
					35.0	0.45390051850784563
					40.0	0.4307712668291449
					45.0	0.4129191444807593
					50.0	0.39910386959442057
					55.0	0.38839678093395447
					60.0	0.38011209145542657
					65.0	0.3737415915036813
					70.0	0.3689047855385693
					75.0	0.36531314481257565
					80.0	0.3627449370500885
					85.0	0.36102751131832267
					90.0	0.36002473976092286
				</tableData>
			</table>
		</contact>

		<!-- 3, 4, 5, 6, 7: propeller -->
		<contact type="STRUCTURE" name="Propeller spinner tip">
			<location unit="IN">
				<x>-56.5</x>
				<y>0</y>
				<z>7.2</z>
			</location>
			<static_friction>0.5</static_friction>
			<dynamic_friction>0.3</dynamic_friction>
			<spring_coeff unit="LBS/FT">2000</spring_coeff>
			<damping_coeff unit="LBS/FT/SEC">1000</damping_coeff>
		</contact>

		<contact type="STRUCTURE" name="Propeller, lower edge">
			<location unit="IN">
				<x>-45.3</x>
				<y>0</y>
				<z>-33.2</z>
			</location>
			<static_friction>0.01</static_friction>
			<dynamic_friction>0.005</dynamic_friction>
			<spring_coeff unit="LBS/FT">500</spring_coeff>
			<damping_coeff unit="LBS/FT/SEC">1000</damping_coeff>
		</contact>

		<contact type="STRUCTURE" name="Propeller, upper edge">
			<location unit="IN">
				<x>-42.5</x>
				<y>0</y>
				<z>46.2</z>
			</location>
			<static_friction>0.01</static_friction>
			<dynamic_friction>0.005</dynamic_friction>
			<spring_coeff unit="LBS/FT">500</spring_coeff>
			<damping_coeff unit="LBS/FT/SEC">1000</damping_coeff>
		</contact>

		<contact type="STRUCTURE" name="Propeller, left edge">
			<location unit="IN">
				<x>-44</x>
				<y>-40</y>
				<z>6.7</z>
			</location>
			<static_friction>0.01</static_friction>
			<dynamic_friction>0.005</dynamic_friction>
			<spring_coeff unit="LBS/FT">500</spring_coeff>
			<damping_coeff unit="LBS/FT/SEC">1000</damping_coeff>
		</contact>

		<contact type="STRUCTURE" name="Propeller, right edge">
			<location unit="IN">
				<x>-44</x>
				<y>40</y>
				<z>6.7</z>
			</location>
			<static_friction>0.01</static_friction>
			<dynamic_friction>0.005</dynamic_friction>
			<spring_coeff unit="LBS/FT">500</spring_coeff>
			<damping_coeff unit="LBS/FT/SEC">1000</damping_coeff>
		</contact>

		<!-- 8, 9, 10, 11 12, 13, 14, 15: wings -->
		<contact type="STRUCTURE" name="Left wing tip, leading edge">
			<location unit="IN">
				<x>32.2</x>
				<y>-212.6</y>
				<z>34.7</z>
			</location>
			<static_friction>0.5</static_friction>
			<dynamic_friction>0.3</dynamic_friction>
			<spring_coeff unit="LBS/FT">2000</spring_coeff>
			<damping_coeff unit="LBS/FT/SEC">1000</damping_coeff>
		</contact>

		<contact type="STRUCTURE" name="Right wing tip, leading edge">
			<location unit="IN">
				<x>32.2</x>
				<y>212.6</y>
				<z>34.7</z>
			</location>
			<static_friction>0.5</static_friction>
			<dynamic_friction>0.3</dynamic_friction>
			<spring_coeff unit="LBS/FT">2000</spring_coeff>
			<damping_coeff unit="LBS/FT/SEC">1000</damping_coeff>
		</contact>

		<contact type="STRUCTURE" name="Left wing tip, trailing edge">
			<location unit="IN">
				<x>78.3</x>
				<y>-219.8</y>
				<z>27</z>
			</location>
			<static_friction>0.5</static_friction>
			<dynamic_friction>0.3</dynamic_friction>
			<spring_coeff unit="LBS/FT">2000</spring_coeff>
			<damping_coeff unit="LBS/FT/SEC">1000</damping_coeff>
		</contact>

		<contact type="STRUCTURE" name="Right wing tip, trailing edge">
			<location unit="IN">
				<x>78.3</x>
				<y>219.8</y>
				<z>27</z>
			</location>
			<static_friction>0.5</static_friction>
			<dynamic_friction>0.3</dynamic_friction>
			<spring_coeff unit="LBS/FT">2000</spring_coeff>
			<damping_coeff unit="LBS/FT/SEC">1000</damping_coeff>
		</contact>

		<contact type="STRUCTURE" name="Left wing center, leading edge">
			<location unit="IN">
				<x>31</x>
				<y>-115</y>
				<z>35.7</z>
			</location>
			<static_friction>0.5</static_friction>
			<dynamic_friction>0.3</dynamic_friction>
			<spring_coeff unit="LBS/FT">2000</spring_coeff>
			<damping_coeff unit="LBS/FT/SEC">1000</damping_coeff>
		</contact>

		<contact type="STRUCTURE" name="Right wing center, leading edge">
			<location unit="IN">
				<x>31</x>
				<y>115</y>
				<z>35.7</z>
			</location>
			<static_friction>0.5</static_friction>
			<dynamic_friction>0.3</dynamic_friction>
			<spring_coeff unit="LBS/FT">2000</spring_coeff>
			<damping_coeff unit="LBS/FT/SEC">1000</damping_coeff>
		</contact>

		<contact type="STRUCTURE" name="Left wing center, trailing edge">
			<location unit="IN">
				<x>89.1</x>
				<y>-115.3</y>
				<z>27.2</z>
			</location>
			<static_friction>0.5</static_friction>
			<dynamic_friction>0.3</dynamic_friction>
			<spring_coeff unit="LBS/FT">2000</spring_coeff>
			<damping_coeff unit="LBS/FT/SEC">1000</damping_coeff>
		</contact>

		<contact type="STRUCTURE" name="Right wing center, trailing edge">
			<location unit="IN">
				<x>89.1</x>
				<y>115.3</y>
				<z>27.2</z>
			</location>
			<static_friction>0.5</static_friction>
			<dynamic_friction>0.3</dynamic_friction>
			<spring_coeff unit="LBS/FT">2000</spring_coeff>
			<damping_coeff unit="LBS/FT/SEC">1000</damping_coeff>
		</contact>

		<!-- 16, 17, 18: rudder and tail fin-->
		<contact type="STRUCTURE" name="Rudder, leading edge upper tip">
			<location unit="IN">
				<x>255.6</x>
				<y>0</y>
				<z>65.1</z>
			</location>
			<static_friction>0.05</static_friction>
			<dynamic_friction>0.025</dynamic_friction>
			<spring_coeff unit="LBS/FT">1000</spring_coeff>
			<damping_coeff unit="LBS/FT/SEC">1000</damping_coeff>
		</contact>

		<contact type="STRUCTURE" name="Rudder, trailing edge upper tip">
			<location unit="IN">
				<x>282.8</x>
				<y>0</y>
				<z>61.2</z>
			</location>
			<static_friction>  0.05 </static_friction>
			<dynamic_friction> 0.025 </dynamic_friction>
			<spring_coeff unit="LBS/FT">1000</spring_coeff>
			<damping_coeff unit="LBS/FT/SEC">1000</damping_coeff>
		</contact>

		<contact type="STRUCTURE" name="Tail fin">
			<location unit="IN">
				<x>216.5</x>
				<y>0</y>
				<z>13.7</z>
			</location>
			<static_friction>1</static_friction>
			<dynamic_friction>0.5</dynamic_friction>
			<spring_coeff unit="LBS/FT">5000</spring_coeff>
			<damping_coeff unit="LBS/FT/SEC">2000</damping_coeff>
		</contact>

		<!-- 19, 20, 21, 22: elevators -->
		<contact type="STRUCTURE" name="Left elevator leading edge tip">
			<location unit="IN">
				<x>210.1</x>
				<y>-75.2</y>
				<z>3.1</z>
			</location>
			<static_friction>0.05</static_friction>
			<dynamic_friction>0.025</dynamic_friction>
			<spring_coeff unit="LBS/FT">1000</spring_coeff>
			<damping_coeff unit="LBS/FT/SEC">1000</damping_coeff>
		</contact>

		<contact type="STRUCTURE" name="Right elevator leading edge tip">
			<location unit="IN">
				<x>210.1</x>
				<y>75.2</y>
				<z>3.1</z>
			</location>
			<static_friction>  0.05 </static_friction>
			<dynamic_friction> 0.025 </dynamic_friction>
			<spring_coeff unit="LBS/FT">1000</spring_coeff>
			<damping_coeff unit="LBS/FT/SEC">1000</damping_coeff>
		</contact>

		<contact type="STRUCTURE" name="Left elevator trailing edge tip">
			<location unit="IN">
				<x>242.6</x>
				<y>-76.4</y>
				<z>1.9</z>
			</location>
			<static_friction>0.05</static_friction>
			<dynamic_friction>0.025</dynamic_friction>
			<spring_coeff unit="LBS/FT">1000</spring_coeff>
			<damping_coeff unit="LBS/FT/SEC">1000</damping_coeff>
		</contact>

		<contact type="STRUCTURE" name="Right elevator trailing edge tip">
			<location unit="IN">
				<x>242.6</x>
				<y>76.4</y>
				<z>1.9</z>
			</location>
			<static_friction>  0.05 </static_friction>
			<dynamic_friction> 0.025 </dynamic_friction>
			<spring_coeff unit="LBS/FT">1000</spring_coeff>
			<damping_coeff unit="LBS/FT/SEC">1000</damping_coeff>
		</contact>

		<!-- 23, 24, 25, 26, 27, 28: antennas -->
		<contact type="STRUCTURE" name="Left comm antenna tip">
			<location unit="IN">
				<x>58.1</x>
				<y>-17.6</y>
				<z>49.3</z>
			</location>
			<static_friction>  0.01 </static_friction>
			<dynamic_friction> 0.005 </dynamic_friction>
			<spring_coeff unit="LBS/FT">500</spring_coeff>
			<damping_coeff unit="LBS/FT/SEC">500</damping_coeff>
		</contact>

		<contact type="STRUCTURE" name="Right comm antenna tip">
			<location unit="IN">
				<x>58.1</x>
				<y>17.6</y>
				<z>49.3</z>
			</location>
			<static_friction>  0.01 </static_friction>
			<dynamic_friction> 0.005 </dynamic_friction>
			<spring_coeff unit="LBS/FT">500</spring_coeff>
			<damping_coeff unit="LBS/FT/SEC">500</damping_coeff>
		</contact>

		<contact type="STRUCTURE" name="ELT antenna tip">
			<location unit="IN">
				<x>150.8</x>
				<y>-4.6</y>
				<z>28.6</z>
			</location>
			<static_friction>  0.01 </static_friction>
			<dynamic_friction> 0.005 </dynamic_friction>
			<spring_coeff unit="LBS/FT">500</spring_coeff>
			<damping_coeff unit="LBS/FT/SEC">500</damping_coeff>
		</contact>

		<contact type="STRUCTURE" name="Transponder antenna tip">
			<location unit="IN">
				<x>52.2</x>
				<y>-11</y>
				<z>-24.9</z>
			</location>
			<static_friction>0.01</static_friction>
			<dynamic_friction>0.005</dynamic_friction>
			<spring_coeff unit="LBS/FT">500</spring_coeff>
			<damping_coeff unit="LBS/FT/SEC">500</damping_coeff>
		</contact>

		<contact type="STRUCTURE" name="Marker beacon antenna">
			<location unit="IN">
				<x>148.5</x>
				<y>-1.2</y>
				<z>-17.9</z>
			</location>
			<static_friction>0.01</static_friction>
			<dynamic_friction>0.005</dynamic_friction>
			<spring_coeff unit="LBS/FT">1000</spring_coeff>
			<damping_coeff unit="LBS/FT/SEC">1000</damping_coeff>
		</contact>

		<contact type="STRUCTURE" name="Weather radar">
			<location unit="IN">
				<x>163.2</x>
				<y>-3</y>
				<z>-15.1</z>
			</location>
			<static_friction>0.01</static_friction>
			<dynamic_friction>0.005</dynamic_friction>
			<spring_coeff unit="LBS/FT">1000</spring_coeff>
			<damping_coeff unit="LBS/FT/SEC">1000</damping_coeff>
		</contact>

		<!-- 29, 30, 31, 32, 33, 34, 35, 36: fuselage bottom -->
		<contact type="STRUCTURE" name="Fuselage bottom, left front">
			<location unit="IN">
				<x>-28.7</x>
				<y>-9.9</y>
				<z>-11.7</z>
			</location>
			<static_friction>1</static_friction>
			<dynamic_friction>0.5</dynamic_friction>
			<spring_coeff unit="LBS/FT">5000</spring_coeff>
			<damping_coeff unit="LBS/FT/SEC">1000</damping_coeff>
		</contact>

		<contact type="STRUCTURE" name="Fuselage bottom, right front">
			<location unit="IN">
				<x>28.7</x>
				<y>9.9</y>
				<z>-11.7</z>
			</location>
			<static_friction>1</static_friction>
			<dynamic_friction>0.5</dynamic_friction>
			<spring_coeff unit="LBS/FT">5000</spring_coeff>
			<damping_coeff unit="LBS/FT/SEC">2000</damping_coeff>
		</contact>

		<contact type="STRUCTURE" name="Fuselage bottom, aft of left cowl flap">
			<location unit="IN">
				<x>-2.3</x>
				<y>-10.8</y>
				<z>-20.5</z>
			</location>
			<static_friction>1</static_friction>
			<dynamic_friction>0.5</dynamic_friction>
			<spring_coeff unit="LBS/FT">5000</spring_coeff>
			<damping_coeff unit="LBS/FT/SEC">1000</damping_coeff>
		</contact>

		<contact type="STRUCTURE" name="Fuselage bottom, aft of right cowl flap">
			<location unit="IN">
				<x>-2.3</x>
				<y>10.8</y>
				<z>-20.5</z>
			</location>
			<static_friction>1</static_friction>
			<dynamic_friction>0.5</dynamic_friction>
			<spring_coeff unit="LBS/FT">5000</spring_coeff>
			<damping_coeff unit="LBS/FT/SEC">2000</damping_coeff>
		</contact>

		<contact type="STRUCTURE" name="Fuselage bottom, left below door post">
			<location unit="IN">
				<x>64</x>
				<y>-12.2</y>
				<z>-23.5</z>
			</location>
			<static_friction>1</static_friction>
			<dynamic_friction>0.5</dynamic_friction>
			<spring_coeff unit="LBS/FT">5000</spring_coeff>
			<damping_coeff unit="LBS/FT/SEC">2000</damping_coeff>
		</contact>

		<contact type="STRUCTURE" name="Fuselage bottom, right below door post">
			<location unit="IN">
				<x>64</x>
				<y>12.2</y>
				<z>-23.5</z>
			</location>
			<static_friction>1</static_friction>
			<dynamic_friction>0.5</dynamic_friction>
			<spring_coeff unit="LBS/FT">5000</spring_coeff>
			<damping_coeff unit="LBS/FT/SEC">2000</damping_coeff>
		</contact>

		<contact type="STRUCTURE" name="Fuselage bottom, left rear end main wheel well">
			<location unit="IN">
				<x>108.5</x>
				<y>-11.3</y>
				<z>-20.3</z>
			</location>
			<static_friction>1</static_friction>
			<dynamic_friction>0.5</dynamic_friction>
			<spring_coeff unit="LBS/FT">5000</spring_coeff>
			<damping_coeff unit="LBS/FT/SEC">2000</damping_coeff>
		</contact>

		<contact type="STRUCTURE" name="Fuselage bottom, right rear end of main wheel well">
			<location unit="IN">
				<x>108.5</x>
				<y>11.3</y>
				<z>-20.3</z>
			</location>
			<static_friction>1</static_friction>
			<dynamic_friction>0.5</dynamic_friction>
			<spring_coeff unit="LBS/FT">5000</spring_coeff>
			<damping_coeff unit="LBS/FT/SEC">2000</damping_coeff>
		</contact>
		<!-- 37: tail tip -->
		<contact type="STRUCTURE" name="Fuselage, tail tip">
			<location unit="IN">
				<x>254.8</x>
				<y>0</y>
				<z>-0.4</z>
			</location>
			<static_friction>1</static_friction>
			<dynamic_friction>0.5</dynamic_friction>
			<spring_coeff unit="LBS/FT">500</spring_coeff>
			<damping_coeff unit="LBS/FT/SEC">2000</damping_coeff>
		</contact>

		<!-- 38, 39, 40, 41, 42, 43, 44, 45, 46, 47: fuselage top -->
		<contact type="STRUCTURE" name="Fuselage top, left front">
			<location unit="IN">
				<x>-39.3</x>
				<y>-11.8</y>
				<z>12.2</z>
			</location>
			<static_friction>1</static_friction>
			<dynamic_friction>0.5</dynamic_friction>
			<spring_coeff unit="LBS/FT">5000</spring_coeff>
			<damping_coeff unit="LBS/FT/SEC">1000</damping_coeff>
		</contact>

		<contact type="STRUCTURE" name="Fuselage top, right front">
			<location unit="IN">
				<x>-39.3</x>
				<y>11.8</y>
				<z>12.2</z>
			</location>
			<static_friction>1</static_friction>
			<dynamic_friction>0.5</dynamic_friction>
			<spring_coeff unit="LBS/FT">5000</spring_coeff>
			<damping_coeff unit="LBS/FT/SEC">2000</damping_coeff>
		</contact>

		<contact type="STRUCTURE" name="Fuselage top, left at top edge of windshield">
			<location unit="IN">
				<x>32.7</x>
				<y>-18</y>
				<z>34.4</z>
			</location>
			<static_friction>1</static_friction>
			<dynamic_friction>0.5</dynamic_friction>
			<spring_coeff unit="LBS/FT">5000</spring_coeff>
			<damping_coeff unit="LBS/FT/SEC">1000</damping_coeff>
		</contact>

		<contact type="STRUCTURE" name="Fuselage top, right at top edge of windshield">
			<location unit="IN">
				<x>32.7</x>
				<y>18</y>
				<z>34.4</z>
			</location>
			<static_friction>1</static_friction>
			<dynamic_friction>0.5</dynamic_friction>
			<spring_coeff unit="LBS/FT">5000</spring_coeff>
			<damping_coeff unit="LBS/FT/SEC">2000</damping_coeff>
		</contact>

		<contact type="STRUCTURE" name="Fuselage top, left aft of COM antennas">
			<location unit="IN">
				<x>58.6</x>
				<y>-23.6</y>
				<z>35.1</z>
			</location>
			<static_friction>1</static_friction>
			<dynamic_friction>0.5</dynamic_friction>
			<spring_coeff unit="LBS/FT">5000</spring_coeff>
			<damping_coeff unit="LBS/FT/SEC">1000</damping_coeff>
		</contact>

		<contact type="STRUCTURE" name="Fuselage top, right aft of COM antennas">
			<location unit="IN">
				<x>58.6</x>
				<y>23.6</y>
				<z>35.1</z>
			</location>
			<static_friction>1</static_friction>
			<dynamic_friction>0.5</dynamic_friction>
			<spring_coeff unit="LBS/FT">5000</spring_coeff>
			<damping_coeff unit="LBS/FT/SEC">2000</damping_coeff>
		</contact>

		<contact type="STRUCTURE" name="Fuselage top, left aft of rear windows">
			<location unit="IN">
				<x>114</x>
				<y>-10.2</y>
				<z>23.1</z>
			</location>
			<static_friction>1</static_friction>
			<dynamic_friction>0.5</dynamic_friction>
			<spring_coeff unit="LBS/FT">5000</spring_coeff>
			<damping_coeff unit="LBS/FT/SEC">1000</damping_coeff>
		</contact>

		<contact type="STRUCTURE" name="Fuselage top, right aft of rear windows">
			<location unit="IN">
				<x>114</x>
				<y>10.2</y>
				<z>23.1</z>
			</location>
			<static_friction>1</static_friction>
			<dynamic_friction>0.5</dynamic_friction>
			<spring_coeff unit="LBS/FT">5000</spring_coeff>
			<damping_coeff unit="LBS/FT/SEC">2000</damping_coeff>
		</contact>

		<contact type="STRUCTURE" name="Fuselage top, left foward of ELT antenna">
			<location unit="IN">
				<x>139.4</x>
				<y>-9.3</y>
				<z>13.7</z>
			</location>
			<static_friction>1</static_friction>
			<dynamic_friction>0.5</dynamic_friction>
			<spring_coeff unit="LBS/FT">5000</spring_coeff>
			<damping_coeff unit="LBS/FT/SEC">1000</damping_coeff>
		</contact>

		<contact type="STRUCTURE" name="Fuselage top, right forward of ELT antenna">
			<location unit="IN">
				<x>139.4</x>
				<y>9.3</y>
				<z>13.7</z>
			</location>
			<static_friction>1</static_friction>
			<dynamic_friction>0.5</dynamic_friction>
			<spring_coeff unit="LBS/FT">5000</spring_coeff>
			<damping_coeff unit="LBS/FT/SEC">2000</damping_coeff>
		</contact>
	</ground_reactions>

	<propulsion>
		<engine file="Rolls_Royce-250_B17F">
			<location unit="IN">
				<x>-17</x>
				<y>0</y>
				<z>7</z>
			</location>
			<orient unit="DEG">
				<pitch>2</pitch>
				<roll>0</roll>
				<yaw>0</yaw>
			</orient>
			<feed>12</feed>
			<thruster file="Hartzell_HC-B3TF-7A">
				<sense>1</sense>
				<location unit="IN">
					<x>-43.8</x>
					<y>0</y>
					<z>6.7</z>
				</location>
				<orient unit="DEG">
					<pitch>2</pitch>
					<roll>0</roll>
					<yaw>0</yaw>
				</orient>
			</thruster>
		</engine>

		<!-- Left main tank -->
		<tank type="FUEL" number="0">
			<location unit="IN">
				<x>57.5</x>
				<y>69.3</y>
				<z>30.9</z>
			</location>
			<capacity unit="LBS">301.5</capacity>
			<contents unit="LBS">298.15</contents>
			<unusable unit="LBS">3.35</unusable>
			<type>JET-A</type>
		</tank>

		<!-- Right main tank -->
		<tank type="FUEL" number="1">
			<location unit="IN">
				<x>57.5</x>
				<y>-69.3</y>
				<z>30.9</z>
			</location>
			<capacity unit="LBS">301.5</capacity>
			<contents unit="LBS">298.15</contents>
			<unusable unit="LBS">3.35</unusable>
			<type>JET-A</type>
		</tank>

		<!-- XXX: All capacity values below are made up and working but should be replaced with real world values some day -->
		<!-- Left fuel pipe wing tank -> reservoir tank -->
		<tank type="FUEL" number="2">
			<location unit="IN">
				<x>71.5</x>
				<y>-22.5</y>
				<z>0</z>
			</location>
			<capacity unit="LBS">1</capacity>
			<contents unit="LBS">1</contents>
			<type>JET-A</type>
		</tank>

		<!-- Right fuel pipe wing tank -> reservoir tank -->
		<tank type="FUEL" number="3">
			<location unit="IN">
				<x>71.5</x>
				<y>22.5</y>
				<z>0</z>
			</location>
			<capacity unit="LBS">1</capacity>
			<contents unit="LBS">1</contents>
			<type>JET-A</type>
		</tank>

		<!-- Left reservoir tank -->
		<tank type="FUEL" number="4">
			<location unit="IN">
				<x>23.9</x>
				<y>-11.8</y>
				<z>-20</z>
			</location>
			<capacity unit="LBS">0.5</capacity>
			<contents unit="LBS">0.5</contents>
			<type>JET-A</type>
		</tank>

		<!-- Right reservoir tank -->
		<tank type="FUEL" number="5">
			<location unit="IN">
				<x>23.9</x>
				<y>11.8</y>
				<z>-20</z>
			</location>
			<capacity unit="LBS">0.5</capacity>
			<contents unit="LBS">0.5</contents>
			<type>JET-A</type>
		</tank>

		<!-- Left fuel pipe reservoir tank -> fuel selector -->
		<tank type="FUEL" number="6">
			<location unit="IN">
				<x>23.9</x>
				<y>-5</y>
				<z>-19</z>
			</location>
			<capacity unit="LBS">0.2</capacity>
			<contents unit="LBS">0.2</contents>
			<type>JET-A</type>
		</tank>

		<!-- Right fuel pipe reservoir tank -> fuel selector -->
		<tank type="FUEL" number="7">
			<location unit="IN">
				<x>23.9</x>
				<y>5</y>
				<z>-19</z>
			</location>
			<capacity unit="LBS">0.2</capacity>
			<contents unit="LBS">0.2</contents>
			<type>JET-A</type>
		</tank>

		<!-- Fuel selector sump-->
		<tank type="FUEL" number="8">
			<location unit="IN">
				<x>26</x>
				<y>0</y>
				<z>-18</z>
			</location>
			<capacity unit="LBS">0.25</capacity>
			<contents unit="LBS">0.25</contents>
			<type>JET-A</type>
		</tank>

		<!-- Fuel pipe fuel selector -> fuel strainer -->
		<tank type="FUEL" number="9">
			<location unit="IN">
				<x>63</x>
				<y>0</y>
				<z>-17</z>
			</location>
			<capacity unit="LBS">0.1</capacity>
			<contents unit="LBS">0.1</contents>
			<type>JET-A</type>
		</tank>

		<!-- Fuel strainer sump -->
		<tank type="FUEL" number="10">
			<location unit="IN">
				<x>50</x>
				<y>0</y>
				<z>-14</z>
			</location>
			<capacity unit="LBS">0.25</capacity>
			<contents unit="LBS">0.25</contents>
			<type>JET-A</type>
		</tank>

		<!-- Fuel pipe fuel strainer -> engine manifold-->
		<tank type="FUEL" number="11">
			<location unit="IN">
				<x>40</x>
				<y>0</y>
				<z>-5</z>
			</location>
			<capacity unit="LBS">0.1</capacity>
			<contents unit="LBS">0.1</contents>
			<type>JET-A</type>
		</tank>

		<!-- Engine nozzle -->
		<tank type="FUEL" number="12">
			<location unit="IN">
				<x>20</x>
				<y>0</y>
				<z>0</z>
			</location>
			<capacity unit="LBS">0.1</capacity>
			<contents unit="LBS">0.1</contents>
			<type>JET-A</type>
		</tank>

		<!-- Transfer tank -->
		<tank type="FUEL" number="13">
			<location unit="IN">
				<x>300</x>
				<y>0</y>
				<z>-20</z>
			</location>
			<capacity unit="LBS">179.56</capacity>
			<contents unit="LBS">0</contents>
			<type>JET-A</type>
		</tank>

		<!-- Left fuel pipe transfer tank -> wing tank -->
		<tank type="FUEL" number="14">
			<location unit="IN">
				<x>120</x>
				<y>-20</y>
				<z>0</z>
			</location>
			<capacity unit="LBS">1</capacity>
			<contents unit="LBS">1</contents>
			<type>JET-A</type>
		</tank>

		<!-- Right fuel pipe transfer tank -> wing tank -->
		<tank type="FUEL" number="15">
			<location unit="IN">
				<x>120</x>
				<y>20</y>
				<z>0</z>
			</location>
			<capacity unit="LBS">1</capacity>
			<contents unit="LBS">1</contents>
			<type>JET-A</type>
		</tank>
	</propulsion>

	<system file="silver-eagle-fuel"/>
	<!--<system file="damage"/>-->
	<system file="hydraulic"/>
	<system file="gear"/>
	<system file="flaps"/>

	<fllight_control file="Systems/fcs-base.xml"/>

	<aerodynamics file="Systems/fdm-aerodynamics.xml"/>

	<external_reactions>
		<force name="hitch" frame="BODY" unit="LBS" >
			<location unit="IN">
				<x>246</x>
				<y>0</y>
				<z>4.4</z>
			</location>
			<direction>
				<x>0</x>
				<y>0</y>
				<z>0</z>
			</direction>
		</force>

		<force name="pushback" frame="BODY" unit="LBS">
			<location unit="IN">
				<x>-10.5</x>
				<y>0</y>
				<z>-35.8</z>
			</location>
			<direction>
				<x>1</x>
				<y>0</y>
				<z>0.05</z>
			</direction>
		</force>
	</external_reactions>
</fdm_config>
